*Heading
** Job name: Job-fiber Model name: Model-1
** Generated by: Abaqus/CAE 2018
*Preprint, echo=NO, model=NO, history=NO, contact=NO
**
** PARTS
**
*Part, name=FiberSection
*Node
      1,   182.166733,   145.273117,           0.
      2,    101.09491,  -209.925751,           0.
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*Element, type=S4R
1,  17,   1, 405,  16
2, 405,   1,  11,  12
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*Nset, nset=Set-Steel
    1,    2,    3,    4,    5,    6
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*Elset, elset=Set-Steel
    1,    2,    3,    4,    5,    6
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*Nset, nset=_PickedSet5, internal
    1,    2,    3,    4,    5,    6
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*Elset, elset=_PickedSet5, internal, generate
   25,  1001,     1
*Nset, nset=_PickedSet6, internal
    7,   10,   53,   54,   55,   56
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*Elset, elset=_PickedSet6, internal, generate
 1006,  2116,     1
*Nset, nset=Set-Core
    7,   10,   53,   54,   55,   56
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*Elset, elset=Set-Core, generate
 1006,  2116,     1
*Nset, nset=Set-Cover
    1,    2,    3,    4,    5,    6
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*Elset, elset=Set-Cover, generate
   25,  1001,     1
*Elset, elset=Set-CoreCore, generate
 1006,  2116,     1
*Elset, elset=Set-CoverCover, generate
   25,  1001,     1
*Elset, elset=Set-SteelSteel
    1,    2,    3,    4,    5,    6
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** Section: Steel
*Shell Section, elset=Set-Steel, material=Steel
1., 5
** Section: Cover
*Shell Section, elset=_PickedSet5, material=Cover
1., 5
** Section: Cover
*Shell Section, elset=_PickedSet6, material=Cover
1., 5
*End Part
**
**
** ASSEMBLY
**
*Assembly, name=Assembly
**
*Instance, name=FiberSection-1, part=FiberSection
*End Instance
**
*End Assembly
**
** MATERIALS
**
*Material, name=Core
*Elastic
35000., 0.25
*Material, name=Cover
*Elastic
30000., 0.2
*Material, name=Steel
*Elastic
210000., 0.3
