*Heading
** Job name: Job-fiber2 Model name: Model-1
** Generated by: Abaqus/CAE 2018
*Preprint, echo=NO, model=NO, history=NO, contact=NO
**
** PARTS
**
*Part, name=SECABAQUS
*Node
      1,   81.6506348,  -91.4230499,           0.
      2,    116.42305,   38.3493652,           0.
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*Element, type=S4R
 1, 549,  56,  57, 533
 2, 533,  57,  58, 534
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*Nset, nset=_PickedSet9, internal
    1,    2,    4,    5,    7,    8
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*Elset, elset=_PickedSet9, internal, generate
  164,  2588,     1
*Nset, nset=_PickedSet10, internal
    1,    2,    3,    4,    5,    6
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*Elset, elset=_PickedSet10, internal
    1,    2,    3,    4,    5,    6
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*Nset, nset=_PickedSet11, internal
    1,    2,    3,    4,    5,    6
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*Elset, elset=_PickedSet11, internal, generate
 2643,  2942,     1
*Nset, nset=Set-CoverC
    1,    2,    4,    5,    7,    8
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*Elset, elset=Set-CoverC, generate
  164,  2588,     1
*Nset, nset=Set-CoreC
    1,    2,    3,    4,    5,    6
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*Elset, elset=Set-CoreC
    1,    2,    3,    4,    5,    6
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*Nset, nset=Set-Steel
    1,    2,    3,    4,    5,    6
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*Elset, elset=Set-Steel
  324,  325,  326,  328,  329,  331
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** Section: Core
*Shell Section, elset=_PickedSet10, material=Core
1., 5
** Section: Cover
*Shell Section, elset=_PickedSet9, material=Cover
1., 5
** Section: Steel
*Shell Section, elset=_PickedSet11, material=Steel
1., 5
*End Part
**
**
** ASSEMBLY
**
*Assembly, name=Assembly
**
*Instance, name=SECABAQUS-1, part=SECABAQUS
*End Instance
**
*End Assembly
**
** MATERIALS
**
*Material, name=Core
*Elastic
35000., 0.25
*Material, name=Cover
*Elastic
30000., 0.2
*Material, name=Steel
*Elastic
210000., 0.3
